###############################################################################
# MD simulation for revPBE0-D3 H2O with NN potential
###############################################################################

###############################################################################
# VARIABLES
###############################################################################
clear
variable dt              equal  0.001                                                   # timestep (ps)
variable intThermo       equal  1                                                       # screen output interval (timesteps)
variable numSteps        equal  400000                                                    # total number of simulation timesteps (timesteps)
variable runnerCutoff    equal  6.3501269880                                            # largest symmetry function cutoff (Angstrom)
variable mass2           equal  15.9994                                                 # mass for element 1 (O)  (g/mol)
variable mass1           equal  1.0080                                                  # mass for element 2 (H) (g/mol)
variable nameStartCfg    string "data.iceic"                				# name of the starting configuration file
variable runnerDir       string "."	                        # directory containing RuNNer files
# set initial velocity distribution
variable initTemp        equal  230                                                   # initial temperature (K)
variable velSeed         equal  498459                                                 # seed for random number generator
# NVT integrator (Nose-Hoover)
variable startTemp       equal  230                                                   # starting temperature for thermostat (K)
variable stopTemp        equal  230                                                   # final temperature for thermostat (K)
variable tDamp           equal  0.02                                                    # thermostat damping factor (ps)
# dump thermodynamic properties (temperature, pressure, potential energy, kinetic energy, integrator quantity)
variable intTD           equal  10                                                      # thermodynamics dump file interval (timesteps)
variable nameTD          string "traj/td"                                               # thermodynamics file name
variable varVolume       equal  vol                                                     # variable required to print volume
variable varKE           equal  ke                                                      # variable required to print kinetic energy
###############################################################################
# SETUP
###############################################################################
units metal                                                                             # define unit system (metal = Angstrom, eV, ps, g/mol)
boundary p p p                                                                          # set periodic boundary conditions
atom_style atomic                                                                       # set atomic style for particles
read_data ${nameStartCfg}                                                               # read start configuration
mass 1 ${mass1}                                                                         # set mass for element 1
mass 2 ${mass2}

### SIMULATION STARTS HERE ###

replicate 1 1 1

neighbor       7.0 bin          # neighbor list skin width
neigh_modify   every 1 delay 0 check yes # frequency to update neighor list

pair_style nnp dir ${runnerDir} showew no showewsum 10 resetew yes maxew 100 cflength 1.8897261328 cfenergy 0.0367493254
pair_coeff * * ${runnerCutoff}                                                          # set up pair style coefficients
timestep ${dt}                                                                          # set timestep
velocity all create ${initTemp} ${velSeed} mom yes rot yes                                             # create initial velocities
#fix AVE_TD all ave/time ${intTD} 1 ${intTD} c_thermo_temp c_thermo_press v_varVolume c_thermo_pe v_varKE f_INT file ${nameTD} mode scalar       # set up thermodynamic properties output
thermo ${intThermo}                                                                     # set screen output
thermo_style custom step time temp pe etotal press vol lx ly lz
thermo_modify format 4 %20.15g
###############################################################################
# SIMULATION
###############################################################################

fix 1 all npt temp ${startTemp} ${stopTemp} ${tDamp} aniso 1.0 1.0 1.0
run  20000
#compute myrdf all rdf 200 1 1 1 2 2 1 2 2 cutoff 12
#fix 2 all ave/time 10 1000 10000 c_myrdf[*] file tmp.rdf mode vector

dump            traj_xyz all custom 5000 out.lammpstrj element x y z
dump_modify     traj_xyz element H O sort id

run ${numSteps}
#
write_restart ${nameRestartEnd}                                                         # write final configuration (binary)
